# OpenSim document version 30000
ScaleTool subject01:
  mass: 68.608 [kg]
  height: 1701.8
  age: -1
  notes: male
  GenericModelMaker:
    model_file: /home/rwalia/MyoBack/OpenSim_Python_Simulation/FBLSmodel.osim
  ModelScaler:
    apply: true
    scaling_order: measurements
    marker_file: subject01_Cal01.trc
    time_range: 0 1.12
    preserve_mass_distribution: true
    output_model_file: /home/rwalia/MyoBack/OpenSim_Python_Simulation/FBLSmodel_v2_scaled.osim
    output_scale_file: subject01_scaleSet.xml
    MeasurementSet:
      Measurement thigh: apply=true
        MarkerPair: markers=(RGTR RKNE)
        MarkerPair: markers=(LGTR LKNE)
        BodyScale femur_r: axes=(X Y Z)
        BodyScale patella_r: axes=(X Y Z)
        BodyScale femur_l: axes=(X Y Z)
        BodyScale patella_l: axes=(X Y Z)
      Measurement foot: apply=true
        MarkerPair: markers=(LHEE LTOE)
        MarkerPair: markers=(RHEE RTOE)
        BodyScale calcn_r: axes=(X Y Z)
        BodyScale toes_r: axes=(X Y Z)
        BodyScale calcn_l: axes=(X Y Z)
        BodyScale toes_l: axes=(X Y Z)
      Measurement pelvis: apply=true
        MarkerPair: markers=(RASI RPSI)
        MarkerPair: markers=(LASI LPSI)
        MarkerPair: markers=(LASI RASI)
        BodyScale pelvis: axes=(X Y Z)
        BodyScale sacrum: axes=(X Y Z)
      Measurement shank: apply=true
        MarkerPair: markers=(LKNE LANK)
        MarkerPair: markers=(RKNE RANK)
        BodyScale tibia_r: axes=(X Y Z)
        BodyScale talus_r: axes=(X Y Z)
        BodyScale tibia_l: axes=(X Y Z)
        BodyScale talus_l: axes=(X Y Z)
      Measurement torso: apply=true
        MarkerPair: markers=(LPSI LBHD)
        MarkerPair: markers=(RPSI RBHD)
        MarkerPair: markers=(RASI RFHD)
        MarkerPair: markers=(LASI RFHD)
        BodyScale lumbar5: axes=(X Y Z)
        BodyScale lumbar4: axes=(X Y Z)
        BodyScale lumbar3: axes=(X Y Z)
        BodyScale lumbar2: axes=(X Y Z)
        BodyScale lumbar1: axes=(X Y Z)
        BodyScale torso: axes=(X Y Z)
        BodyScale Abdomen: axes=(X Y Z)
        BodyScale LB_wrap: axes=(X Y Z)
      Measurement humerus: apply=true
        MarkerPair: markers=(RSHO RELB)
        MarkerPair: markers=(LSHO LELB)
        BodyScale humerus_r: axes=(X Y Z)
        BodyScale humerus_l: axes=(X Y Z)
      Measurement radius_ulna: apply=true
        MarkerPair: markers=(LELB LWRA)
        MarkerPair: markers=(RELB RWRA)
        MarkerPair: markers=(LELB LWRB)
        MarkerPair: markers=(RELB RWRB)
        BodyScale ulna_r: axes=(X Y Z)
        BodyScale radius_r: axes=(X Y Z)
        BodyScale ulna_l: axes=(X Y Z)
        BodyScale radius_l: axes=(X Y Z)
      Measurement hand: apply=true
        MarkerPair: markers=(RWRB RFIN)
        MarkerPair: markers=(RWRA RFIN)
        MarkerPair: markers=(LWRB LFIN)
        MarkerPair: markers=(LWRA LFIN)
        BodyScale hand_r: axes=(X Y Z)
        BodyScale hand_l: axes=(X Y Z)
  MarkerPlacer:
    apply: true
    marker_file: subject01_Cal01.trc
    time_range: 0 1.12
    output_motion_file: subject01_static_output.mot
    output_model_file: subject01_scaled.osim
    max_marker_movement: -1
    IKTaskSet subject01_Scale:
      IKMarkerTask LFHD: apply=false weight=1
      IKMarkerTask RFHD: apply=false weight=1
      IKMarkerTask RBHD: apply=false weight=1
      IKMarkerTask LBHD: apply=false weight=1
      IKMarkerTask C7: apply=true weight=300
      IKMarkerTask LSHO: apply=true weight=200
      IKMarkerTask RSHO: apply=true weight=200
      IKMarkerTask CLAV: apply=true weight=200
      IKMarkerTask STRN: apply=true weight=1
      IKMarkerTask RBAK: apply=false weight=1
      IKMarkerTask T10: apply=true weight=50
      IKMarkerTask RUPA: apply=false weight=1
      IKMarkerTask LUPA: apply=false weight=1
      IKMarkerTask RELB: apply=true weight=100
      IKMarkerTask LELB: apply=true weight=100
      IKMarkerTask LFRA: apply=false weight=1
      IKMarkerTask RFRA: apply=false weight=1
      IKMarkerTask RWRB: apply=true weight=200
      IKMarkerTask RWRA: apply=true weight=200
      IKMarkerTask RFIN: apply=false weight=5
      IKMarkerTask LWRB: apply=true weight=200
      IKMarkerTask LWRA: apply=true weight=200
      IKMarkerTask LFIN: apply=false weight=5
      IKMarkerTask RGTR: apply=true weight=100
      IKMarkerTask LGTR: apply=true weight=100
      IKMarkerTask RASI: apply=true weight=100
      IKMarkerTask LASI: apply=true weight=100
      IKMarkerTask RPSI: apply=true weight=100
      IKMarkerTask LPSI: apply=true weight=100
      IKMarkerTask RANK: apply=true weight=50
      IKMarkerTask LANK: apply=true weight=50
      IKMarkerTask LMMA: apply=true weight=50
      IKMarkerTask LHEE: apply=true weight=10
      IKMarkerTask LTOE: apply=true weight=10
      IKMarkerTask RMMA: apply=true weight=50
      IKMarkerTask RHEE: apply=true weight=10
      IKMarkerTask RTOE: apply=true weight=10
      IKMarkerTask RMT5: apply=false weight=1
      IKMarkerTask LMT5: apply=false weight=1
      IKMarkerTask RKNE: apply=true weight=50
      IKMarkerTask LKNE: apply=true weight=50
      IKMarkerTask LMFC: apply=true weight=50
      IKMarkerTask RMFC: apply=true weight=50
      IKMarkerTask RMTP: apply=true weight=50
      IKMarkerTask LMTP: apply=true weight=50
      IKMarkerTask RLTP: apply=true weight=50
      IKMarkerTask LLTP: apply=true weight=50
      IKMarkerTask RFP1: apply=false weight=1
      IKMarkerTask RFP2: apply=false weight=1
      IKMarkerTask RFP3: apply=false weight=1
      IKMarkerTask RFM1: apply=false weight=1
      IKMarkerTask RFM2: apply=false weight=1
      IKMarkerTask RFM3: apply=false weight=1
      IKMarkerTask RFA1: apply=false weight=1
      IKMarkerTask RFA2: apply=false weight=1
      IKMarkerTask RFA3: apply=false weight=1
      IKMarkerTask LFP1: apply=false weight=1
      IKMarkerTask LFP2: apply=false weight=1
      IKMarkerTask LFP3: apply=false weight=1
      IKMarkerTask LFM1: apply=false weight=1
      IKMarkerTask LFM2: apply=false weight=1
      IKMarkerTask LFM3: apply=false weight=1
      IKMarkerTask LFA1: apply=false weight=1
      IKMarkerTask LFA2: apply=false weight=1
      IKMarkerTask LFA3: apply=false weight=1
      IKMarkerTask RTP1: apply=false weight=1
      IKMarkerTask RTP2: apply=false weight=1
      IKMarkerTask RTP3: apply=false weight=1
      IKMarkerTask RTA1: apply=false weight=1
      IKMarkerTask RTA2: apply=false weight=1
      IKMarkerTask RTA3: apply=false weight=1
      IKMarkerTask LTP1: apply=false weight=1
      IKMarkerTask LTP2: apply=false weight=1
      IKMarkerTask LTP3: apply=false weight=1
      IKMarkerTask LTA1: apply=false weight=1
      IKMarkerTask LTA2: apply=false weight=1
      IKMarkerTask LTA3: apply=false weight=1
      IKCoordinateTask pelvis_tilt: apply=true weight=1 value_type=default_value value=0
      IKCoordinateTask pelvis_list: apply=true weight=1 value_type=default_value value=0
      IKCoordinateTask hip_flexion_r: apply=false weight=1 value_type=default_value value=0
      IKCoordinateTask hip_rotation_r: apply=true weight=5 value_type=manual_value value=-0.08726646
      IKCoordinateTask ankle_angle_r: apply=true weight=10 value_type=manual_value value=0.00872665
      IKCoordinateTask hip_flexion_l: apply=false weight=1 value_type=default_value value=0
      IKCoordinateTask hip_rotation_l: apply=true weight=5 value_type=manual_value value=-0.08726646
      IKCoordinateTask ankle_angle_l: apply=true weight=10 value_type=manual_value value=0.00872665
      IKCoordinateTask arm_flex_r: apply=false weight=5 value_type=default_value value=0
      IKCoordinateTask arm_rot_r: apply=false weight=5 value_type=default_value value=0
      IKCoordinateTask elbow_flex_r: apply=false weight=1 value_type=manual_value value=0.08726646
      IKCoordinateTask pro_sup_r: apply=false weight=1 value_type=default_value value=1.570796
      IKCoordinateTask arm_flex_l: apply=false weight=5 value_type=default_value value=0
      IKCoordinateTask arm_rot_l: apply=false weight=5 value_type=default_value value=0
      IKCoordinateTask elbow_flex_l: apply=false weight=1 value_type=manual_value value=0.08726646
      IKCoordinateTask pro_sup_l: apply=false weight=1 value_type=default_value value=1.570796
